# OpenSim document version 40000
InverseKinematicsTool:
  results_directory: ./
  model_file: X:\ShoulderInstability\MuscleStrengtheningSimulation\shoulder-strength-sims\ModelFiles\MR_scaledAdjusted.osim
  constraint_weight: 20
  accuracy: 1e-5
  marker_file: X:\ShoulderInstability\MuscleStrengtheningSimulation\shoulder-strength-sims\ExpData\UpwardReach9002_withJointCentres.trc
  time_range: 3.264 4.968
  report_errors: true
  output_motion_file: X:\ShoulderInstability\MuscleStrengtheningSimulation\shoulder-strength-sims\ExpData\UpwardReach9002\UpwardReach9002_Concentric_ik.mot
  report_marker_locations: true
  IKTaskSet:
    IKMarkerTask C7: apply=true weight=10
    IKMarkerTask XI: apply=false weight=1
    IKMarkerTask MCLAV: apply=true weight=10
    IKMarkerTask T10: apply=true weight=10
    IKMarkerTask R.ACR: apply=true weight=10
    IKMarkerTask R.SJC: apply=true weight=25
    IKMarkerTask L.ACR: apply=false weight=1
    IKMarkerTask R.LUA.Top: apply=true weight=5
    IKMarkerTask R.LUA.Left: apply=true weight=5
    IKMarkerTask R.LUA.Right: apply=true weight=5
    IKMarkerTask R.PUA.Top: apply=true weight=5
    IKMarkerTask R.PUA.Left: apply=true weight=5
    IKMarkerTask R.PUA.Right: apply=true weight=5
    IKMarkerTask R.LELB: apply=false weight=1
    IKMarkerTask R.MELB: apply=false weight=1
    IKMarkerTask R.EJC: apply=false weight=1
    IKMarkerTask R.FA.Top: apply=true weight=5
    IKMarkerTask R.FA.Left: apply=true weight=5
    IKMarkerTask R.FA.Right: apply=true weight=5
    IKMarkerTask R.LWRI: apply=true weight=10
    IKMarkerTask R.MWRI: apply=true weight=10
    IKMarkerTask R.FIN1: apply=false weight=1
    IKMarkerTask R.FIN5: apply=false weight=1
