# OpenSim document version 20302
IKTaskSet:
  IKMarkerTask C7: apply=true weight=10
  IKMarkerTask XI: apply=false weight=1
  IKMarkerTask MCLAV: apply=true weight=10
  IKMarkerTask T10: apply=true weight=10
  IKMarkerTask R.ACR: apply=true weight=10
  IKMarkerTask R.SJC: apply=true weight=25
  IKMarkerTask L.ACR: apply=false weight=1
  IKMarkerTask R.LUA.Top: apply=true weight=5
  IKMarkerTask R.LUA.Left: apply=true weight=5
  IKMarkerTask R.LUA.Right: apply=true weight=5
  IKMarkerTask R.PUA.Top: apply=true weight=5
  IKMarkerTask R.PUA.Left: apply=true weight=5
  IKMarkerTask R.PUA.Right: apply=true weight=5
  IKMarkerTask R.LELB: apply=false weight=1
  IKMarkerTask R.MELB: apply=false weight=1
  IKMarkerTask R.EJC: apply=false weight=1
  IKMarkerTask R.FA.Top: apply=true weight=5
  IKMarkerTask R.FA.Left: apply=true weight=5
  IKMarkerTask R.FA.Right: apply=true weight=5
  IKMarkerTask R.LWRI: apply=true weight=10
  IKMarkerTask R.MWRI: apply=true weight=10
  IKMarkerTask R.FIN1: apply=false weight=1
  IKMarkerTask R.FIN5: apply=false weight=1
  IKMarkerTask R.HAND: apply=false weight=1
