# OpenSim document version 20302
MarkerPlacer:
  apply: true
  max_marker_movement: -1
  IKTaskSet Scale_TaskSet:
    IKMarkerTask C7: apply=true weight=250
    IKMarkerTask XI: apply=false weight=1
    IKMarkerTask MCLAV: apply=true weight=250
    IKMarkerTask T10: apply=true weight=250
    IKMarkerTask R.ACR: apply=true weight=250
    IKMarkerTask L.ACR: apply=true weight=250
    IKMarkerTask R.SJC: apply=true weight=1000
    IKMarkerTask R.LUA.Top: apply=false weight=1
    IKMarkerTask R.LUA.Left: apply=false weight=1
    IKMarkerTask R.LUA.Right: apply=false weight=1
    IKMarkerTask R.PUA.Top: apply=false weight=1
    IKMarkerTask R.PUA.Left: apply=false weight=1
    IKMarkerTask R.PUA.Right: apply=false weight=1
    IKMarkerTask R.LELB: apply=true weight=1
    IKMarkerTask R.MELB: apply=true weight=1
    IKMarkerTask R.EJC: apply=true weight=1000
    IKMarkerTask R.FA.Top: apply=false weight=1
    IKMarkerTask R.FA.Left: apply=false weight=1
    IKMarkerTask R.FA.Right: apply=false weight=1
    IKMarkerTask R.LWRI: apply=true weight=50
    IKMarkerTask R.MWRI: apply=true weight=50
    IKMarkerTask R.FIN1: apply=true weight=5
    IKMarkerTask R.FIN5: apply=true weight=5
    IKMarkerTask R.HAND: apply=false weight=1
    IKCoordinateTask [values shared by the 11 below unless stated]: apply=false weight=100 value_type=default_value
        value=0
    IKCoordinateTask thorax_tilt
    IKCoordinateTask thorax_list
    IKCoordinateTask thorax_rotation
    IKCoordinateTask thorax_tx
    IKCoordinateTask thorax_ty
    IKCoordinateTask thorax_tz
    IKCoordinateTask elv_angle
    IKCoordinateTask shoulder_elv
    IKCoordinateTask shoulder_rot
    IKCoordinateTask elbow_flexion
    IKCoordinateTask pro_sup
