# OpenSim document version 20302
MeasurementSet:
  Measurement torso_width: apply=true
    MarkerPair: markers=(R.ACR L.ACR)
    BodyScale thorax: axes=Z
  Measurement torso_depth: apply=true
    MarkerPair: markers=(MCLAV C7)
    BodyScale thorax: axes=X
  Measurement torso_height: apply=true
    MarkerPair: markers=(C7 T10)
    BodyScale thorax: axes=Y
  Measurement r_clavicle_scapula: apply=true
    MarkerPair: markers=(MCLAV R.ACR)
    BodyScale clavicle: axes=(X Y Z)
    BodyScale clavphant: axes=(X Y Z)
    BodyScale scapula: axes=(X Z)
    BodyScale scapphant: axes=(X Z)
  Measurement r_scapula_height: apply=true
    MarkerPair: markers=(R.ACR MCLAV)
    BodyScale scapula: axes=Y
    BodyScale scapphant: axes=Y
  Measurement r_humerus_length: apply=true
    MarkerPair: markers=(R.SJC R.EJC)
    BodyScale humerus: axes=Y
    BodyScale humphant: axes=Y
    BodyScale humphant1: axes=Y
  Measurement r_humerus_breadth: apply=true
    MarkerPair: markers=(R.LELB R.MELB)
    BodyScale humerus: axes=(X Z)
    BodyScale humphant: axes=(X Z)
    BodyScale humphant1: axes=(X Z)
  Measurement r_forearm_length: apply=true
    MarkerPair: markers=(R.EJC R.LWRI)
    MarkerPair: markers=(R.EJC R.MWRI)
    BodyScale radius: axes=Y
    BodyScale ulna: axes=Y
  Measurement r_forearm_breadth: apply=true
    MarkerPair: markers=(R.MWRI R.LWRI)
    BodyScale radius: axes=(X Z)
    BodyScale ulna: axes=(X Z)
  Measurement r_hand: apply=true
    MarkerPair: markers=(R.MWRI R.LWRI)
    MarkerPair: markers=(R.FIN1 R.FIN5)
    MarkerPair: markers=(R.FIN1 R.LWRI)
    MarkerPair: markers=(R.FIN5 R.MWRI)
    BodyScale hand_r: axes=(X Y Z)
