# OpenSim document version 40000
Model MR:
  assembly_accuracy: 1e-7
  gravity: 0 -9.8 0
  publications:
    Saul et al. (2015). Benchmarking of dynamic simulation predictions in two software platforms using an upper limb musculoskeletal model. Comput Meth Biomech Biomed Eng, 18: 1445-1458. Wu et al. (2016). Subject-specific musculoskeletal modeling in the evaluation of shoulder muscle and joint function. J Biomech, 49: 3626-3634. Gonzalez et al. (1997). How muscle architecture and moment arms affect wrist flexion-extension moments. J Biomech, 30: 705-712.
  Ground
  BodySet:
    Body thorax: mass=24.96724 [kg] mass_center=(-0.03877371 0.4898989 0) inertia=(1.84071 0.9431375 1.786905 0 0 0)
        meshes=(thorax.vtp hat_spine.vtp)
      WrapCylinder SpineCyl: xyz_body_rotation=(1.57 0 0) translation=(-0.06061623 0.1379219 0.01924857) quadrant=all
          radius=0.01762553 length=0.1224747
      WrapCylinder SpineCyl2: active=false xyz_body_rotation=(1.57 -1.2 0)
          translation=(-0.06061623 0.04606581 0.02538273) quadrant=all radius=0.02559397 length=0.1989326
      WrapCylinder SpineCyl3: xyz_body_rotation=(1.57 -0.21 0) translation=(-0.111022 -0.1149579 0.02538273)
          quadrant=all radius=0.02361341 length=0.2890561
      WrapCylinder SpineCyl_t1: xyz_body_rotation=(1.57 -1.2 0) translation=(-0.06061623 0.01837121 0.02538273)
          quadrant=all radius=0.02559397 length=0.1989326
      WrapEllipsoid Thorax: xyz_body_rotation=(0.0434587 -0.331962 0.189892)
          translation=(-0.04988884 -0.1948879 0.07498482) quadrant=all dimensions=(0.127735 0.205709 0.0868739)
      WrapEllipsoid ThoraxSRA: xyz_body_rotation=(0 -0.331962 0.139892) translation=(-0.04988884 -0.1428362 0.0687449)
          quadrant=all dimensions=(0.0637585 0.152628 0.0705232)
      WrapEllipsoid ThoraxSRA2: xyz_body_rotation=(0 -0.431962 0.139892) translation=(-0.0330869 -0.1795786 0.08989718)
          quadrant=all dimensions=(0.0945323 0.167864 0.0716558)
      WrapEllipsoid ThoraxLAT: xyz_body_rotation=(0 -0.431962 0.139892) translation=(-0.04342655 -0.2189236 0.0687449)
          quadrant=all dimensions=(0.0945323 0.167864 0.0716558)
    Body clavicle: mass=0.2496724 mass_center=(-0.01576306 0.01052739 0.08176718) inertia=(0 0 0 0 0 0)
        meshes=clavicle.vtp
    Body clavphant: mass=0.0001248362 mass_center=(0 0 0) inertia=(1.916962 1.916962 1.916962 0 0 0)
    Body scapula: mass=0.624181 mass_center=(-0.08922138 -0.04832825 -0.08054708) inertia=(0 0 0 0 0 0)
        meshes=scapula.vtp
      WrapTorus INFSP: active=false xyz_body_rotation=(0.0253073 0.58835 0.151844)
          translation=(-0.06951832 -0.0246598 -0.01387888) quadrant=all inner_radius=0.009913487
          outer_radius=0.02354453
      WrapEllipsoid TMIN: xyz_body_rotation=(-2.09754 -0.280823 -1.76348)
          translation=(-0.05179797 -0.06431374 -0.04448677) quadrant=x dimensions=(0.0371756 0.0371756 0.0619593)
      WrapCylinder TRIlongglen: xyz_body_rotation=(1.37532 -0.294612 2.43596)
          translation=(-0.04448677 -0.03829084 -0.01635725) quadrant=x radius=0.003717557 length=0.03717557
    Body scapphant: mass=0.0001248362 mass_center=(0 0 0) inertia=(1.916962 1.916962 1.916962 0 0 0)
    Body humphant: mass=0.0001248362 mass_center=(0 0 0) inertia=(1.248362 1.248362 1.248362 0 0 0)
    Body humphant1: mass=0.0001248362 mass_center=(0 0 0) inertia=(1.248362 1.248362 1.248362 0 0 0)
    Body humerus: mass=2.537296 mass_center=(0 -0.1983122 0) inertia=(0.01491293 0.0051445 0.01673929 0 0 0)
        meshes=humerus.vtp
      WrapEllipsoid SUPSP: xyz_body_rotation=(0.0380482 0.00855211 -1.30673)
          translation=(0.000282174 0.009282584 0.00606674) quadrant=all dimensions=(0.024419 0.0279565 0.0282119)
      WrapEllipsoid INFSP_and_TMIN_hum_head: xyz_body_rotation=(-0.286583 -0.00907571 -0.0684169)
          translation=(-0.0004232609 0.003134379 0.005361305) quadrant=all dimensions=(0.0282023 0.0306019 0.0279115)
      WrapCylinder TMINhum: xyz_body_rotation=(1.75353 0.0692896 2.74628) translation=(-0.001975218 -0.05485163 0)
          quadrant=x radius=0.009850962 length=0.08497247
      WrapSphere TMAJ_LAT_PEC_CORBhh: translation=(0.0004232609 -0.01084977 0.008465219) quadrant=all radius=0.03288937
      WrapCylinder TMAJ_LAThum: xyz_body_rotation=(1.53641 -0.0637045 1.41424)
          translation=(0.0009876089 -0.053405 -0.007759784) quadrant=-x radius=0.009872602 length=0.04826781
      WrapEllipsoid PEC1hh: xyz_body_rotation=(-0.620465 -0.310494 0.363727)
          translation=(-0.005220218 0.0006027652 -0.003527174) quadrant=all dimensions=(0.0411241 0.0263014 0.0270251)
      WrapCylinder PEC12hum: xyz_body_rotation=(1.55928 -0.0774926 -0.925897)
          translation=(0.00282174 -0.06124095 -0.002398479) quadrant=x radius=0.01269258 length=0.08448261
      WrapSphere PEC23hh: translation=(-0.01213348 0.002531614 -0.0005643479) quadrant=all radius=0.02684847
      WrapCylinder PEC3hum: xyz_body_rotation=(1.44094 -0.0561996 1.75196)
          translation=(0.001269783 -0.06642473 -0.0005643479) quadrant=-x radius=0.01127181 length=0.0846965
      WrapCylinder LAT_TMAJhh: xyz_body_rotation=(-0.305084 -0.018326 -0.686613)
          translation=(-0.03160348 0.01229641 0.01326218) quadrant=-y radius=0.00924898 length=0.06271161
      WrapSphere LAT_TMAJ2hh: xyz_body_rotation=(-0.127235 0.276111 0.0197222)
          translation=(-0.002257392 0.01109088 0.007336523) quadrant=-z radius=0.0402727
      WrapCylinder CORBhum: xyz_body_rotation=(-1.60832 0.0959931 0.875283)
          translation=(0.003809348 -0.1449048 -0.008324132) quadrant=x radius=0.0112789 length=0.06039429
      WrapEllipsoid TRIlonghh: xyz_body_rotation=(3.00162 -0.853466 2.57419)
          translation=(-0.01100478 -0.004942675 -0.001975218) quadrant=z dimensions=(0.0480517 0.0250081 0.0281853)
      WrapCylinder TRI: xyz_body_rotation=(-0.14015 -0.00628319 0.154985)
          translation=(0.003950435 -0.3518943 -0.01678935) quadrant=all radius=0.02097175 length=0.05628599
      WrapEllipsoid ANC: xyz_body_rotation=(0.00750492 -0.196699 1.04929)
          translation=(0.01890566 -0.3449023 -0.001128696) quadrant=-x dimensions=(0.025198 0.027251 0.0282172)
      WrapEllipsoid BIClong: xyz_body_rotation=(-2.00434 -1.00164 0.975465)
          translation=(0.00465587 0.008800372 0.0004232609) quadrant=-y dimensions=(0.0352406 0.0251819 0.0272914)
      WrapEllipsoid Elbow_BIC_BRD: xyz_body_rotation=(-0.128631 0.137532 0.0307178)
          translation=(0.002680653 -0.3483983 -0.01975218) quadrant=x dimensions=(0.0211626 0.0181374 0.140779)
      WrapEllipsoid Elbow_PT_ECRL: xyz_body_rotation=(-0.161094 -0.110828 0.61453)
          translation=(0.004232609 -0.3462283 -0.009735002) quadrant=x dimensions=(0.0242003 0.0321125 0.0492108)
    Body ulna: mass=0.7583799 mass_center=(0 -0.1456739 0) inertia=(0.003697648 0.0007714877 0.004010987 0 0 0)
        meshes=ulna.vtp
    Body radius: mass=0.2916049 mass_center=(0.04347837 -0.2194433 0.02016592)
        inertia=(0.0005474692 0.0001105924 0.0005025656 3.762563e-5 -5.293055e-6 8.011988e-5) meshes=radius.vtp
    Body hand_r: mass=0.5711256 mass_center=(0 -0.08774476 0) inertia=(0.001848917 0.001133809 0.002777521 0 0 0)
        meshes=(pisiform.vtp scaphoid.vtp triquetrum.vtp hamate.vtp capitate.vtp trapezoid.vtp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)
  JointSet:
    CustomJoint ground_thorax: socket_parent_frame=ground_offset socket_child_frame=thorax_offset
      Coordinate thorax_tilt: default_value=-0.1301746 range=(-1.5708 1.5708) clamped=true
      Coordinate thorax_list: default_value=0.0594809 range=(-1.5708 1.5708) clamped=true
      Coordinate thorax_rotation: default_value=-0.1772622 range=(-1.5708 1.5708) clamped=true
      Coordinate thorax_tx: default_value=-0.3776084 range=(-20 20) clamped=true
      Coordinate thorax_ty: default_value=1.576702 range=(-2 4) clamped=true
      Coordinate thorax_tz: default_value=0.05835969 range=(-5 5) clamped=true
      PhysicalOffsetFrame ground_offset: socket_parent=/ground translation=(0 0 0) [meters]
      PhysicalOffsetFrame thorax_offset: socket_parent=/bodyset/thorax translation=(0 0 0)
      SpatialTransform:
        TransformAxis rotation1: coordinates=thorax_tilt axis=(0 0 1) LinearFunction(coefficients=1 0)
        TransformAxis rotation2: coordinates=thorax_list axis=(1 0 0) LinearFunction(coefficients=1 0)
        TransformAxis rotation3: coordinates=thorax_rotation axis=(0 1 0) LinearFunction(coefficients=1 0)
        TransformAxis translation1: coordinates=thorax_tx axis=(1 0 0)
            MultiplierFunction(scale=1, LinearFunction(coefficients=1 0))
        TransformAxis translation2: coordinates=thorax_ty axis=(0 1 0)
            MultiplierFunction(scale=1, LinearFunction(coefficients=1 0))
        TransformAxis translation3: coordinates=thorax_tz axis=(0 0 1)
            MultiplierFunction(scale=1, LinearFunction(coefficients=1 0))
    CustomJoint sternoclavicular: socket_parent_frame=thorax_offset socket_child_frame=clavicle_offset
      Coordinate sternoclavicular_r2: default_value=-0.3801336 range=(-99999.9 99999.9) clamped=true
      Coordinate sternoclavicular_r3: default_value=0.1610066 range=(-99999.9 99999.9) clamped=true
      PhysicalOffsetFrame thorax_offset: socket_parent=/bodyset/thorax translation=(0.00817479 0.01060937 0.02693214)
      PhysicalOffsetFrame clavicle_offset: socket_parent=/bodyset/clavicle translation=(0 0 0)
      SpatialTransform: axes_held_at_zero=(rotation3 translation1 translation2 translation3)
        TransformAxis rotation1: coordinates=sternoclavicular_r2 axis=(0.0153 0.9892987 -0.1451)
            LinearFunction(coefficients=1 0)
        TransformAxis rotation2: coordinates=sternoclavicular_r3 axis=(-0.9944725 0 -0.104997)
            LinearFunction(coefficients=1 0)
    CustomJoint unrotscap: socket_parent_frame=clavicle_offset socket_child_frame=clavphant_offset
      Coordinate unrotscap_r3: default_value=-0.1610066 range=(-99999.9 99999.9) clamped=true
      Coordinate unrotscap_r2: default_value=0.3801336 range=(-99999.9 99999.9) clamped=true
      PhysicalOffsetFrame clavicle_offset: socket_parent=/bodyset/clavicle
          translation=(-0.01775753 0.02487046 0.1679531)
      PhysicalOffsetFrame clavphant_offset: socket_parent=/bodyset/clavphant translation=(0 0 0)
      SpatialTransform: axes_held_at_zero=(rotation3 translation1 translation2 translation3)
        TransformAxis rotation1: coordinates=unrotscap_r3 axis=(-0.9944725 0 -0.104997)
            LinearFunction(coefficients=1 0)
        TransformAxis rotation2: coordinates=unrotscap_r2 axis=(0.0153 0.9892987 -0.1451)
            LinearFunction(coefficients=1 0)
    CustomJoint acromioclavicular: socket_parent_frame=clavphant_offset socket_child_frame=scapula_offset
      Coordinate acromioclavicular_r2: default_value=-0.07696931 range=(-99999.9 99999.9) clamped=true
      Coordinate acromioclavicular_r3: default_value=0.6220389 range=(-99999.9 99999.9) clamped=true
      Coordinate acromioclavicular_r1: default_value=0.2796022 range=(-99999.9 99999.9) clamped=true
      PhysicalOffsetFrame clavphant_offset: socket_parent=/bodyset/clavphant translation=(0 0 0)
      PhysicalOffsetFrame scapula_offset: socket_parent=/bodyset/scapula translation=(0 0 0)
      SpatialTransform: axes_held_at_zero=(translation1 translation2 translation3)
        TransformAxis rotation1: coordinates=acromioclavicular_r2 axis=(0.1570949 0.9472686 -0.2792909)
            LinearFunction(coefficients=1 0)
        TransformAxis rotation2: coordinates=acromioclavicular_r3 axis=(-0.754084 0.297594 0.585487)
            LinearFunction(coefficients=1 0)
        TransformAxis rotation3: coordinates=acromioclavicular_r1 axis=(0.6376998 0.1186 0.7610998)
            LinearFunction(coefficients=1 0)
    CustomJoint unrothum: socket_parent_frame=scapula_offset socket_child_frame=scapphant_offset
      Coordinate unrothum_r1: default_value=-0.2796022 range=(-99999.9 99999.9) clamped=true
      Coordinate unrothum_r3: default_value=-0.6220389 range=(-99999.9 99999.9) clamped=true
      Coordinate unrothum_r2: default_value=0.07696931 range=(-99999.9 99999.9) clamped=true
      PhysicalOffsetFrame scapula_offset: socket_parent=/bodyset/scapula
          translation=(-0.01183422 -0.04213232 0.01115267)
      PhysicalOffsetFrame scapphant_offset: socket_parent=/bodyset/scapphant translation=(0 0 0)
      PhysicalOffsetFrame rotated_scap_frame: socket_parent=/bodyset/scapula
          translation=(-0.01183422 -0.04213232 0.01115267) orientation=(-1.5708 0 0.523599) [radians]
      SpatialTransform: axes_held_at_zero=(translation1 translation2 translation3)
        TransformAxis rotation1: coordinates=unrothum_r1 axis=(0.6376998 0.1186 0.7610998)
            LinearFunction(coefficients=1 0)
        TransformAxis rotation2: coordinates=unrothum_r3 axis=(-0.754084 0.297594 0.585487)
            LinearFunction(coefficients=1 0)
        TransformAxis rotation3: coordinates=unrothum_r2 axis=(0.1570949 0.9472686 -0.2792909)
            LinearFunction(coefficients=1 0)
    CustomJoint shoulder0: socket_parent_frame=scapphant_offset socket_child_frame=humphant_offset
      Coordinate elv_angle: default_value=0 range=(-1.570796 2.268928) clamped=true
      PhysicalOffsetFrame scapphant_offset: socket_parent=/bodyset/scapphant translation=(0 0 0)
      PhysicalOffsetFrame humphant_offset: socket_parent=/bodyset/humphant translation=(0 0 0)
      SpatialTransform: axes_held_at_zero=(rotation2 rotation3 translation1 translation2 translation3)
        TransformAxis rotation1: coordinates=elv_angle axis=(0.0048 0.9990892 0.04240001)
            LinearFunction(coefficients=1 0)
    CustomJoint shoulder1: socket_parent_frame=humphant_offset socket_child_frame=humphant1_offset
      Coordinate shoulder_elv: default_value=1.570796 range=(0 3.141593) clamped=true
      Coordinate shoulder1_r2: default_value=0 range=(-99999.9 99999.9) clamped=true
      PhysicalOffsetFrame humphant_offset: socket_parent=/bodyset/humphant translation=(0 0 0)
      PhysicalOffsetFrame humphant1_offset: socket_parent=/bodyset/humphant1 translation=(0 0 0)
      SpatialTransform: axes_held_at_zero=(rotation3 translation1 translation2 translation3)
        TransformAxis rotation1: coordinates=shoulder_elv axis=(-0.9982614 0.0023 0.05889802)
            LinearFunction(coefficients=1 0)
        TransformAxis rotation2: coordinates=shoulder1_r2 axis=(0.0048 0.9990892 0.04240001)
            LinearFunction(coefficients=1 0)
    CustomJoint shoulder2: socket_parent_frame=humphant1_offset socket_child_frame=humerus_offset
      Coordinate shoulder_rot: default_value=0 range=(-1.570796 1.919862) clamped=true
      PhysicalOffsetFrame humphant1_offset: socket_parent=/bodyset/humphant1 translation=(0 0 0)
      PhysicalOffsetFrame humerus_offset: socket_parent=/bodyset/humerus translation=(0 0 0)
      SpatialTransform: axes_held_at_zero=(rotation2 rotation3 translation1 translation2 translation3)
        TransformAxis rotation1: coordinates=shoulder_rot axis=(0.0048 0.9990892 0.04240001)
            LinearFunction(coefficients=1 0)
    CustomJoint elbow: socket_parent_frame=humerus_offset socket_child_frame=ulna_offset
      Coordinate elbow_flexion: default_value=2.726651e-5 range=(0 2.268928) clamped=true
      PhysicalOffsetFrame humerus_offset: socket_parent=/bodyset/humerus translation=(0.008606306 -0.350086 -0.0173537)
      PhysicalOffsetFrame ulna_offset: socket_parent=/bodyset/ulna translation=(0 0 0)
      SpatialTransform: axes_held_at_zero=(rotation1 rotation2 translation1 translation2 translation3)
        TransformAxis rotation3: coordinates=elbow_flexion axis=(0.04940001 0.03660001 0.9981082)
            LinearFunction(coefficients=1 0)
    CustomJoint radioulnar: socket_parent_frame=ulna_offset socket_child_frame=radius_offset
      Coordinate pro_sup: default_value=-1.570686 range=(-1.570796 1.570796) clamped=true
      PhysicalOffsetFrame ulna_offset: socket_parent=/bodyset/ulna translation=(0.0005170749 -0.01390323 0.02585245)
      PhysicalOffsetFrame radius_offset: socket_parent=/bodyset/radius translation=(0 0 0)
      SpatialTransform: axes_held_at_zero=(rotation1 rotation3 translation1 translation2 translation3)
        TransformAxis rotation2: coordinates=pro_sup axis=(-0.01716099 0.9926656 -0.119668)
            LinearFunction(coefficients=1 0)
    WeldJoint radius_hand_r: socket_parent_frame=radius_offset socket_child_frame=hand_r_offset
      PhysicalOffsetFrame radius_offset: socket_parent=/bodyset/radius translation=(0.02212421 -0.2781129 0.03072808)
      PhysicalOffsetFrame hand_r_offset: socket_parent=/bodyset/hand_r translation=(0 0 0)
  ConstraintSet:
    CoordinateCouplerConstraint [values shared by the 11 below unless stated]: independent_coordinate_names=shoulder_elv
        scale_factor=1
    CoordinateCouplerConstraint sternoclavicular_r2_con: dependent_coordinate_name=sternoclavicular_r2
      coupled_coordinates_function: SimmSpline: x=(0 2.61799) y=(0 -0.633555)
    CoordinateCouplerConstraint sternoclavicular_r3_con: dependent_coordinate_name=sternoclavicular_r3
      coupled_coordinates_function: SimmSpline: x=(0 3.14159) y=(0 0.322013)
    CoordinateCouplerConstraint unrotscap_r2_con: dependent_coordinate_name=unrotscap_r2
      coupled_coordinates_function: SimmSpline: x=(0 2.61799) y=(0 0.633555)
    CoordinateCouplerConstraint unrotscap_r3_con: dependent_coordinate_name=unrotscap_r3
      coupled_coordinates_function: SimmSpline: x=(0 3.14159) y=(0 -0.322013)
    CoordinateCouplerConstraint acromioclavicular_r1_con: dependent_coordinate_name=acromioclavicular_r1
      coupled_coordinates_function: SimmSpline: x=(0 2.61799) y=(0 0.466003)
    CoordinateCouplerConstraint acromioclavicular_r2_con: dependent_coordinate_name=acromioclavicular_r2
      coupled_coordinates_function: SimmSpline: x=(0 2.61799) y=(0 -0.128282)
    CoordinateCouplerConstraint acromioclavicular_r3_con: dependent_coordinate_name=acromioclavicular_r3
      coupled_coordinates_function: SimmSpline: x=(0 2.61799) y=(0 1.03673)
    CoordinateCouplerConstraint unrothum_r1_con: dependent_coordinate_name=unrothum_r1
      coupled_coordinates_function: SimmSpline: x=(0 2.61799) y=(0 -0.466003)
    CoordinateCouplerConstraint unrothum_r2_con: dependent_coordinate_name=unrothum_r2
      coupled_coordinates_function: SimmSpline: x=(0 2.61799) y=(0 0.128282)
    CoordinateCouplerConstraint unrothum_r3_con: dependent_coordinate_name=unrothum_r3
      coupled_coordinates_function: SimmSpline: x=(0 2.61799) y=(0 -1.03673)
    CoordinateCouplerConstraint shoulder1_r2_con: independent_coordinate_names=elv_angle
        dependent_coordinate_name=shoulder1_r2
      coupled_coordinates_function: SimmSpline: x=(-1.5708 3.14159) y=(1.5708 -3.14159)
  ForceSet:
    CoordinateLimitForce shoulder_elv_ligaments: coordinate=shoulder_elv upper_stiffness=100 [N*m/degree]
        upper_limit=150 [degrees] lower_stiffness=100 [N*m/degree] lower_limit=30 [degrees] damping=0
        transition=542.8423 [degrees]
    CoordinateLimitForce shoulder_elv_damping: coordinate=shoulder_elv upper_stiffness=1e-8 upper_limit=190
        lower_stiffness=1e-8 lower_limit=190 damping=0.001745 transition=1
    CoordinateLimitForce elv_angle_ligaments: coordinate=elv_angle upper_stiffness=100 upper_limit=100
        lower_stiffness=100 lower_limit=-60 damping=0 transition=545.4471
    CoordinateLimitForce elv_angle_damping: coordinate=elv_angle upper_stiffness=1e-8 upper_limit=190
        lower_stiffness=1e-8 lower_limit=190 damping=0.001745 transition=1
    CoordinateLimitForce shoulder_rot_ligaments: coordinate=shoulder_rot upper_stiffness=100 upper_limit=-10
        lower_stiffness=100 lower_limit=-60 damping=0 transition=485.466
    CoordinateLimitForce shoulder_rot_damping: coordinate=shoulder_rot upper_stiffness=1e-8 upper_limit=190
        lower_stiffness=1e-8 lower_limit=190 damping=0.001745 transition=1
    CoordinateLimitForce elbow_flexion_ligaments: coordinate=elbow_flexion upper_stiffness=0.3037 upper_limit=85
        lower_stiffness=100 lower_limit=14 damping=0 transition=139.5813
    CoordinateLimitForce elbow_flexion_damping: coordinate=elbow_flexion upper_stiffness=1e-8 upper_limit=190
        lower_stiffness=1e-8 lower_limit=190 damping=0.001745 transition=1
    CoordinateLimitForce pro_sup_ligaments: coordinate=pro_sup upper_stiffness=50 upper_limit=60 lower_stiffness=50
        lower_limit=-60 damping=0 transition=430.1186
    CoordinateLimitForce pro_sup_damping: coordinate=pro_sup upper_stiffness=1e-8 upper_limit=190 lower_stiffness=1e-8
        lower_limit=190 damping=0.001745 transition=1
    Millard2012EquilibriumMuscle [values shared by the 26 below unless stated]: min_control=0.01 max_control=1
        ignore_tendon_compliance=true minimum_activation=0.01
      ActiveForceLengthCurve: minimum_value=0
      ForceVelocityCurve: concentric_slope_at_vmax=0 concentric_slope_near_vmax=0.25 isometric_slope=5
          eccentric_slope_at_vmax=0 eccentric_slope_near_vmax=0.15 max_eccentric_velocity_force_multiplier=1.4
      FiberForceLengthCurve
      TendonForceLengthCurve
    Millard2012EquilibriumMuscle LVS: max_isometric_force=169.9564 optimal_fiber_length=0.2007048
        tendon_slack_length=0.007096434 pennation_angle_at_optimal=0 [radians]
      PathPoint DELT2-P2: thorax (-0.04816082 0.1445781 0.02384264)
      PathPoint DELT2-P3: scapula (-0.08382733 0.0008331492 -0.1185325)
    Millard2012EquilibriumMuscle TRP1: max_isometric_force=280.5671 optimal_fiber_length=0.1375038
        tendon_slack_length=0.02059606 pennation_angle_at_optimal=0
      PathPoint DELT2-P2: thorax (-0.07620339 0.1482707 0.002035663)
      PathPoint DELT2-P3: clavicle (-0.03791636 0.03078869 0.1217586)
      PathWrap: wrap_object=SpineCyl
    Millard2012EquilibriumMuscle TRP2: max_isometric_force=162.45 optimal_fiber_length=0.1068962
        tendon_slack_length=0.05364295 pennation_angle_at_optimal=0
      PathPoint DELT2-P2: thorax (-0.1001294 0.04815982 0.003774761)
      PathPoint DELT2-P3: scapula (-0.04832825 -0.003199206 -0.01239186)
      PathWrap: wrap_object=SpineCyl2
    Millard2012EquilibriumMuscle TRP3: max_isometric_force=155.2832 optimal_fiber_length=0.09798966
        tendon_slack_length=0.023838 pennation_angle_at_optimal=0
      PathPoint DELT2-P2: thorax (-0.1191201 -0.02358389 0.002650402)
      PathPoint DELT2-P3: scapula (-0.07229906 -0.00806653 -0.05503931)
    Millard2012EquilibriumMuscle TRP4: max_isometric_force=557.2435 optimal_fiber_length=0.1792804
        tendon_slack_length=0.006991524 pennation_angle_at_optimal=0
      PathPoint DELT2-P2: thorax (-0.1499004 -0.1616115 0.0007230113)
      PathPoint DELT2-P3: scapula (-0.09813348 -0.0160399 -0.09777189)
      PathWrap: wrap_object=SpineCyl3 method=hybrid
    Millard2012EquilibriumMuscle RMN: max_isometric_force=301.6171 optimal_fiber_length=0.1381552
        tendon_slack_length=0.02958387 pennation_angle_at_optimal=0
      PathPoint DELT2-P2: thorax (-0.08142478 0.08567368 0.003172842)
      PathPoint DELT2-P3: scapula (-0.09796631 -0.01629926 -0.1242395)
      PathWrap: wrap_object=SpineCyl2
    Millard2012EquilibriumMuscle RMJ1: max_isometric_force=185.9359 optimal_fiber_length=0.1065403
        tendon_slack_length=0.02933641 pennation_angle_at_optimal=0
      PathPoint DELT2-P2: thorax (-0.1021802 0.01445208 0.001516386)
      PathPoint DELT2-P3: scapula (-0.1119509 -0.05237345 -0.1290959)
      PathWrap: wrap_object=SpineCyl3
    Millard2012EquilibriumMuscle RMJ2: max_isometric_force=111.5701 optimal_fiber_length=0.1022302
        tendon_slack_length=0.05333039 pennation_angle_at_optimal=0
      PathPoint DELT2-P2: thorax (-0.1124438 -0.03827336 0.001516386)
      PathPoint DELT2-P3: scapula (-0.1239186 -0.1226794 -0.120201)
      PathWrap: wrap_object=SpineCyl3
    Millard2012EquilibriumMuscle SRA1: max_isometric_force=365.1178 optimal_fiber_length=0.09938243
        tendon_slack_length=0.08141109 pennation_angle_at_optimal=0
      PathPoint DELT2-P2: thorax (-0.001220119 -0.08598691 0.1267222)
      PathPoint DELT2-P3: scapula (-0.1088622 -0.05854719 -0.1221535)
      PathWrap: wrap_object=ThoraxSRA method=hybrid
    Millard2012EquilibriumMuscle SRA2: max_isometric_force=179.9626 optimal_fiber_length=0.1583476
        tendon_slack_length=0.05205697 pennation_angle_at_optimal=0
      PathPoint DELT2-P2: thorax (-0.0008089785 -0.1561721 0.1457656)
      PathPoint DELT2-P3: scapula (-0.1153683 -0.07718901 -0.1220825)
      PathWrap: wrap_object=ThoraxSRA method=hybrid
    Millard2012EquilibriumMuscle SRA3: max_isometric_force=377.9217 optimal_fiber_length=0.1829916
        tendon_slack_length=0.01203786 pennation_angle_at_optimal=0
      PathPoint DELT2-P2: thorax (-0.01469963 -0.2477312 0.1574449)
      PathPoint DELT2-P3: scapula (-0.1200567 -0.09593628 -0.1217406)
      PathWrap: wrap_object=ThoraxSRA2 method=hybrid
    Millard2012EquilibriumMuscle SBCL: max_isometric_force=195.8076 optimal_fiber_length=0.03153442
        tendon_slack_length=0.05749651 pennation_angle_at_optimal=0
      PathPoint DELT2-P2: thorax (-0.001199222 -0.0202068 0.04138041)
      PathPoint DELT2-P3: clavicle (-0.01951433 0.01125857 0.09381789)
    Millard2012EquilibriumMuscle PMN: max_isometric_force=218.7229 optimal_fiber_length=0.1672922
        tendon_slack_length=0.007269169 pennation_angle_at_optimal=0
      PathPoint P1: scapula (0.01487023 -0.0511412 -0.03286321)
      PathPoint P2: thorax (0.04193376 -0.1149398 0.09456982)
    Millard2012EquilibriumMuscle DELT1: max_isometric_force=556.8 optimal_fiber_length=0.21325
        tendon_slack_length=0.03809775 pennation_angle_at_optimal=0.3839724
      PathPoint P1: humerus (0.006432311 -0.1253137 0.01094152)
      PathPoint P3: clavicle (-0.00285848 0.03904067 0.16186)
      PathPoint P4: clavicle (-0.02994926 0.02389671 0.122698)
    Millard2012EquilibriumMuscle DELT2: max_isometric_force=1098.4 optimal_fiber_length=0.1625694
        tendon_slack_length=0.05760236 pennation_angle_at_optimal=0.2617994
      PathPoint P1: humerus (0.006432311 -0.1253137 0.01094152)
      PathPoint default: humerus (-0.004938397 -0.06985796 0.04001382)
      PathPoint P3: scapula (-0.0342537 -0.005997015 0.02275281)
      PathPoint P3_0: scapula (-0.03411404 -0.003968121 0.0017675)
    Millard2012EquilibriumMuscle DELT3: max_isometric_force=944.7 optimal_fiber_length=0.1502603
        tendon_slack_length=0.1193028 pennation_angle_at_optimal=0.3141593
      PathPoint P1: scapula (-0.07318941 -0.001943923 -0.04765983)
      PathPoint P2: scapula (-0.08945447 -0.02939361 0.007406961)
      PathPoint P2_0: humerus (-0.02622031 -0.05991727 0.008325035)
      PathPoint P3: humerus (0.006432311 -0.1253137 0.01094152)
    Millard2012EquilibriumMuscle SUPSP: max_isometric_force=410.7 optimal_fiber_length=0.1476432
        tendon_slack_length=0.03142962 pennation_angle_at_optimal=0.122173
      PathPoint P1: humerus (0.02011181 0.02030632 0.02954897)
      PathPoint P2: humerus (0.005030879 0.03765028 0.007784474)
      PathPoint P2_0: scapula (-0.06961709 -0.001656903 -0.05043957)
      PathPoint P3: scapula (-0.08307477 -0.01436154 -0.07992426)
      PathWrap: wrap_object=SUPSP method=hybrid
    Millard2012EquilibriumMuscle INFSP: max_isometric_force=864.6 optimal_fiber_length=0.1687246
        tendon_slack_length=0.04297822 pennation_angle_at_optimal=0.3228859
      PathPoint P1: humerus (-0.007192008 0.009693514 0.03724231)
      PathPoint P2: scapula (-0.0528685 -0.06008254 -0.02714424)
      PathPoint P3: scapula (-0.1090298 -0.06760106 -0.0859415)
      PathWrap: wrap_object=INFSP
      PathWrap pathwrap_0: wrap_object=INFSP_and_TMIN_hum_head method=hybrid
    Millard2012EquilibriumMuscle SUBSC: max_isometric_force=944.3 optimal_fiber_length=0.2078891
        tendon_slack_length=0.009553727 pennation_angle_at_optimal=0.3490659
      PathPoint P1: humerus (0.02821669 -0.01002004 -0.00246723)
      PathPoint P2: humerus (0.01048478 0.0125069 -0.03200629)
      PathPoint default: scapula (-0.04846307 -0.04001083 -0.04135337)
      PathPoint P3: scapula (-0.08922138 -0.04832825 -0.08054708)
    Millard2012EquilibriumMuscle TMIN: max_isometric_force=605.4 optimal_fiber_length=0.05788836
        tendon_slack_length=0.1326449 pennation_angle_at_optimal=0.418879
      PathPoint P1: humerus (0.009250128 -0.004405213 0.03058498)
      PathPoint P1_0: humerus (-0.01196038 -0.01709056 0.03793109)
      PathPoint P2: scapula (-0.09296236 -0.06524412 -0.01272371)
      PathPoint P3: scapula (-0.1016137 -0.08362162 -0.05072062)
    Millard2012EquilibriumMuscle TMAJ: max_isometric_force=234.9 optimal_fiber_length=0.1706739
        tendon_slack_length=0.06603163 pennation_angle_at_optimal=0.2792527
      PathPoint P1: humerus (0.005218807 -0.05424887 -0.009541769)
      PathPoint default: scapula (-0.05619943 -0.1316214 -0.003062685)
      PathPoint P3: scapula (-0.1297539 -0.1335309 -0.08817489)
    Millard2012EquilibriumMuscle PECM1: max_isometric_force=983.4 optimal_fiber_length=0.1256678
        tendon_slack_length=0.0588493 pennation_angle_at_optimal=0.296706
      PathPoint P1: humerus (0.02257392 -0.0488188 0.007054349)
      PathPoint P2: clavicle (-0.0006020312 0.006902748 0.07331085)
      PathPoint P3: clavicle (0.001369821 0.007538389 0.06359663)
    Millard2012EquilibriumMuscle PECM2: max_isometric_force=699.7 optimal_fiber_length=0.1755423
        tendon_slack_length=0.1197449 pennation_angle_at_optimal=0.4363323
      PathPoint P1: humerus (0.02257392 -0.04279115 0.007054349)
      PathPoint P2: thorax (0.05469316 -0.06655155 0.08546842)
      PathPoint default: thorax (0.03213797 -0.07284675 0.01847271)
    Millard2012EquilibriumMuscle PECM3: max_isometric_force=446.7 optimal_fiber_length=0.2464108
        tendon_slack_length=0.1342823 pennation_angle_at_optimal=0.4363323
      PathPoint P1: humerus (0.02257392 -0.03616591 0.007054349)
      PathPoint P2: thorax (0.05592228 -0.1424703 0.08760533)
      PathPoint P2_0: thorax (0.08097798 -0.2262093 0.02333117)
    Millard2012EquilibriumMuscle LAT: max_isometric_force=1129.7 optimal_fiber_length=0.3131549
        tendon_slack_length=0.1040696 pennation_angle_at_optimal=0.3316126
      PathPoint LAT2-P1: humerus (0.01399233 -0.02692396 -0.01244669)
      PathPoint P2: humerus (0.002851833 -0.02277343 -0.03028446)
      PathPoint LAT2-P2: thorax (-0.1223983 -0.2464773 0.0005416506)
      PathWrap: wrap_object=ThoraxLAT method=hybrid
    Millard2012EquilibriumMuscle CORB: max_isometric_force=306.9 optimal_fiber_length=0.1010688
        tendon_slack_length=0.0747083 pennation_angle_at_optimal=0
      PathPoint P1: scapula (0.01548982 -0.0511412 -0.03286321)
      PathPoint P3: humerus (0 -0.1543079 -0.0164499)
      PathWrap: wrap_object=CORBhum
      PathWrap pathwrap_0: wrap_object=TMAJ_LAT_PEC_CORBhh
    ObjectGroup Scapulothoracic: members=(SBCL SRA1 SRA2 SRA3 TRP1 TRP2 TRP3 TRP4 LVS RMN RMJ1 RMJ2 PMN)
    ObjectGroup Glenohumeral: members=(DELT1 DELT2 DELT3 INFSP LAT PECM1 PECM2 PECM3 SUBSC SUPSP TMAJ TMIN CORB)
  MarkerSet:
    Marker C7: thorax (-0.1275995 0.06026581 0) fixed=true
    Marker MCLAV: thorax (0.02748726 0.01090277 0.01176827) fixed=true
    Marker T10: thorax (-0.13508 -0.3158028 -0.0006290799) fixed=true
    Marker R.ACR: scapula (-0.005003032 0.01349377 -0.004199377) fixed=true
    Marker R.LUA.Top: humerus (0.001035116 -0.125085 0.06088668)
    Marker R.LUA.Left: humerus (-0.01997716 -0.1519978 0.05136474)
    Marker R.LUA.Right: humerus (0.02432102 -0.1476124 0.04521382)
    Marker R.PUA.Top: humerus (-0.07546974 -0.1976743 -0.01756688)
    Marker R.PUA.Left: humerus (-0.06283663 -0.2198645 -0.04397213)
    Marker R.PUA.Right: humerus (-0.06244383 -0.2269207 0.001440202)
    Marker R.LELB: humerus (-0.01768196 -0.3549533 0.02548823) fixed=true
    Marker R.MELB: humerus (0.008387689 -0.3430566 -0.0681606) fixed=true
    Marker R.FA.Top: radius (-0.002575867 -0.07170969 0.03915339)
    Marker R.FA.Left: radius (-0.01806547 -0.1028761 0.03146119)
    Marker R.FA.Right: radius (0.02046878 -0.09692372 0.05203791)
    Marker R.LWRI: radius (0.06845257 -0.269558 0.0344178) fixed=true
    Marker R.MWRI: ulna (0.01174909 -0.2906474 0.03982092) fixed=true
    Marker R.FIN1: hand_r (0.03024544 -0.09897085 0.04062358) fixed=true
    Marker R.FIN5: hand_r (-0.03124738 -0.08561018 0.02680047) fixed=true
    Marker R.HAND: hand_r (0.008484247 -0.01701838 0.02857659)
    Marker R.SJC: humerus (0 0 0) fixed=true
    Marker R.EJC: ulna (0 0 0) fixed=true
    Marker L.ACR: thorax (-0.04238733 0.04952525 -0.1371388)
